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/batch
! ANSYS input file written by Workbench version 2019 R2
! File used for geometry attach: D:\PDF's\Academic\BITS\SEM I\TEP\Project\Design\Model\Rotating_Disk_files\dp0\SYS\DM\SYS.scdoc
/title,Rotating_Disk--Solution for Completely Elastic (E5)
/com,--- Data in consistent NMM units. See Solving Units in the help system for more information.
/units,MPA
/prep7
! Turn off shape checking because checks already performed inside WB mesher.
! See help system for more information.
SHPP,OFF,,NOWARN
etcon,set             ! allow ANSYS to choose best KEYOP's for 180x elements
/com,*********** Nodes for the whole assembly ***********
nblock,3,,35152
(1i9,3e20.9e3)
        1     0.000000000E+00     5.000000000E+00     0.000000000E+00
        2     0.000000000E+00     0.000000000E+00     0.000000000E+00
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-1
/com,*********** Elements for Body 1 "SYS\Surface" ***********
et,1,183
keyo,1,3,1
eblock,19,solid,,9980
(19i9)
        1        1        1        1        0        0        0        0        8        0        1     3329    10128     9713     2017    19099    31477    15020    15019
        1        1        1        1        0        0        0        0        8        0        2     2017     2581     4099     3329    15018    17050    19097    15019
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-1
/com,*********** Send User Defined Coordinate System(s) ***********
csys,0
toffst,273.15,  ! Temperature offset from absolute zero
/com,*********** Set Reference Temperature ***********
tref,22.
/com,*********** Send Materials ***********
MP,DENS,1,7.85e-09,	! tonne mm^-3
MP,C,1,434000000,	! mm^2 s^-2 C^-1
MP,EX,1,200000,	! tonne s^-2 mm^-1
MP,NUXY,1,0.3,

TB,BISO,1,1,
TBDATA,1,250,0.2

/com,*********** Send Sheet Properties ***********
!************************* Model Summary ********************
!SYS\Surface,	Structural Steel NL,	matid,	1
!************************* End Model Summary ********************
/com,*********** Fixed Supports ***********
CMBLOCK,_FIXEDSU,NODE,        1
(8i10)
         2
cmsel,s,_FIXEDSU
d,all,all
nsel,all
/com,*********** Define Rotational Velocity ***********
cglo,0.,2.49999994412065,0.
tblist
fini
/com,****************************************************************************
/com,*************************    SOLUTION       ********************************
/com,****************************************************************************
/solu
antype,0                   ! static analysis
nlgeom,on                  ! Turn on Large Deformation Effects
eqsl,sparse,,,,,1
cntr,print,1               ! print out contact info and also make no initial contact an error
dmpoption,emat,no             ! Don't combine emat file for DANSYS
dmpoption,esav,no             ! Don't combine esav file for DANSYS
nldiag,cont,iter           ! print out contact info each equilibrium iteration
rescontrol,define,last,last,,dele	   ! Program Controlled
/com,****************************************************
/com,******************* SOLVE FOR LS 1 OF 1 ****************
cgom,0.0,1070.7
autots,on                  ! Workbench Program Controlled automatic time stepping
nsub,5,1000,1              ! due to presence of nonlinear materials
time,1.
outres,erase
outres,all,none
outres,nsol,all,
outres,rsol,all
outres,eangl,all
outres,etmp,all
outres,veng,all
outres,strs,all,
outres,epel,all,
outres,eppl,all,
outres,cont,all,
! *********** WB SOLVE COMMAND ***********
! check interactive state
*get,ANSINTER_,active,,int
*if,ANSINTER_,ne,0,then
/eof
*endif
solve
/com *************** Write FE CONNECTORS *********
CEWRITE,file,ce,,INTE
/com,****************************************************
/com,*************** FINISHED SOLVE FOR LS 1 *************
/post1
fini
